f(x) := 2*x^3 + 3*x^2 - 24*x - 10
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z := 0
xk := root(f(z), z)
xk = -0.401887
g(x) := 3*x + cos(x) + 1
x := (cos(x) + 1)/3  # error: Эта переменная не определена.
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xk := root(g(z), z)
xk = -0.607102
