h := 0.4
z := [0.2; 0.6; 1.0; 1.4; 1.8]
y := [1.02; 1.25; 1.87; 3.069; 5.07]
P(x) := 1.02 + 0.23*(x - 0.2)/h + 0.39*(x - 0.2)*(x - 0.6)/(2!*h^2) + 0.19*(x - 0.2)*(x - 0.6)*(x - 1.0)/(3!*h^3) + 0.03*(x - 0.2)*(x - 0.6)*(x - 1.0)*(x - 1.4)/(4!*h^4) collect → 0.048828125*x^4 + 0.338541666667*x^3 + 0.49609375*x^2 - 0.0135416666667*x + 1.000078125
P(0.5) = 1.1627
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